// SBML level 3 version 2

model PBK_PFOA()
  // model units - substance: substance, time: time_unit, volume: volume

  // Compartments:
  compartment Intestine_lumen; Intestine_lumen has L; Intestine_lumen is "intestine lumen";
  compartment Intestine_tissue; Intestine_tissue has L; Intestine_tissue is "intestine tissue";
  compartment Liver_extracellular; Liver_extracellular has L; Liver_extracellular is "liver extracellular";
  compartment Liver_intracellular; Liver_intracellular has L; Liver_intracellular is "liver intracellular";
  compartment Plasma; Plasma has L; Plasma is "plasma";
  compartment Kidney_proximal_tubule_tissue; Kidney_proximal_tubule_tissue has L; Kidney_proximal_tubule_tissue is "kidney proximal tubule tissue";
  compartment Kidney_proximal_tubule_lumen; Kidney_proximal_tubule_lumen has L; Kidney_proximal_tubule_lumen is "kidney proximal tubule lumen";
  compartment Kidney_rest_tissue; Kidney_rest_tissue has L; Kidney_rest_tissue is "kidney rest of kidney tissue";
  compartment Kidney_rest_lumen; Kidney_rest_lumen has L; Kidney_rest_lumen is "kidney rest of kidney lumen";
  compartment Adipose; Adipose has L; Adipose is "adipose";
  compartment Rest; Rest has L; Rest is "restbody";
  compartment Feces = 1 L; Feces is "feces";
  compartment Urine = 1 L; Urine is "urine";
  compartment Menstrual = 1 L; Menstrual is "menstrual plasma";

  // Species:
  substanceOnly species AIntestine_lumen in Intestine_lumen = 0; AIntestine_lumen is "amount of chemical in intestinal lumen";  // substance in MicroGM
  substanceOnly species AIntestine_tissue in Intestine_tissue = 0; AIntestine_tissue is "amount of chemical in intestinal tissue";  // substance in MicroGM
  substanceOnly species ALiver_extracellular in Liver_extracellular = 0; ALiver_extracellular is "amount of chemical in liver extracellular";  // substance in MicroGM
  substanceOnly species ALiver_intracellular in Liver_intracellular = 0; ALiver_intracellular is "amount of chemical in liver intracellular";  // substance in MicroGM
  substanceOnly species APlasma in Plasma = 0; APlasma is "amount of chemical in plasma";  // substance in MicroGM
  substanceOnly species AKidney_proximal_tubule_tissue in Kidney_proximal_tubule_tissue = 0; AKidney_proximal_tubule_tissue is "amount of chemical in kidney tubule tissue";  // substance in MicroGM
  substanceOnly species AKidney_proximal_tubule_lumen in Kidney_proximal_tubule_lumen = 0; AKidney_proximal_tubule_lumen is "amount of chemical in kidney tubule lumen";  // substance in MicroGM
  substanceOnly species AKidney_rest_tissue in Kidney_rest_tissue = 0; AKidney_rest_tissue is "amount of chemical in rest kidney tissue";  // substance in MicroGM
  substanceOnly species AKidney_rest_lumen in Kidney_rest_lumen = 0; AKidney_rest_lumen is "amount of chemical in rest kidney lumen";  // substance in MicroGM
  substanceOnly species AAdipose in Adipose = 0; AAdipose is "amount of chemical in adipose";  // substance in MicroGM
  substanceOnly species ARest in Rest = 0; ARest is "amount of chemical in restbody";  // substance in MicroGM
  substanceOnly species AFeces in Feces = 0; AFeces is "cumulative amount of chemical in feces";  // substance in MicroGM
  substanceOnly species AUrine in Urine = 0; AUrine is "cumulative amount of chemical in urine";  // substance in MicroGM
  substanceOnly species AMenstrual in Menstrual = 0; AMenstrual is "cumulative amount of chemical in menstrual plasma";  // substance in MicroGM

  // Parameters:
  VIntestine_lumen has L; VIntestine_lumen is "volume of intestine lumen";
  VIntestine_tissue has L; VIntestine_tissue is "volume of intestine tissue";
  VLiver_extracellular has L; VLiver_extracellular is "volume of liver extracellular";
  VLiver_intracellular has L; VLiver_intracellular is "volume of liver intracellular";
  VPlasma has L; VPlasma is "volume of plasma";
  VKidney_proximal_tubule_tissue has L; VKidney_proximal_tubule_tissue is "volume of kidney proximal tubule tissue";
  VKidney_proximal_tubule_lumen has L; VKidney_proximal_tubule_lumen is "volume of kidney proximal tubule lumen";
  VKidney_rest_tissue has L; VKidney_rest_tissue is "volume of rest of kidney tissue";
  VKidney_rest_lumen has L; VKidney_rest_lumen is "volume of rest of kidney lumen";
  VAdipose has L; VAdipose is "volume of adipose tissue";
  VRest has L; VRest is "volume of restbody";
  BW has L; BW is "bodyweight";
  QC has L_PER_DAY; QC is "Plasma cardiac output";
  HCT has UNITLESS; HCT is "hematocrit";
  VIntestine_lumenc = 0.038 UNITLESS; VIntestine_lumenc is "volume fraction of intestine lumen";
  VIntestine_tissuec = 0.014 UNITLESS; VIntestine_tissuec is "volume fraction of intestine tissue";
  QIntestine has L_PER_DAY; QIntestine is "plasma flow to intestine";
  QIntestinec has UNITLESS; QIntestinec is "Blood flow fraction to intestine tissue";
  VKidney has L; VKidney is "volume of kidney";
  VKidneyc has UNITLESS; VKidneyc is "volume fraction of kidney";
  QKidney has L_PER_DAY; QKidney is "plasma flow to kidney";
  QKidneyc has UNITLESS; QKidneyc is "blood fraction to kidney";
  VAdiposec has UNITLESS; VAdiposec is "volume fraction of adipose tissue";
  MAc has UNITLESS; MAc is "Adipose mass";
  VAdrenalc has UNITLESS; VAdrenalc is "volume fraction of adrenal";
  VBonec has UNITLESS; VBonec is "volume fraction of bone";
  VBonenonperfusedc has UNITLESS; VBonenonperfusedc is "volution fraction of bone perfused";
  VBrainc has UNITLESS; VBrainc is "volume fraction of brain";
  VBreastc has UNITLESS; VBreastc is "volume fraction of breast";
  VHeartc has UNITLESS; VHeartc is "volume fraction of heart";
  VMarrowc has UNITLESS; VMarrowc is "volume fraction of marrow";
  VMusclec has UNITLESS; VMusclec is "volume fraction of muscle";
  VGonadc has UNITLESS; VGonadc is "volume fraction of gonads";
  VPancreasc has UNITLESS; VPancreasc is "volume fraction of pancreas";
  VSkinc has UNITLESS; VSkinc is "volume fraction of skin";
  VSpleenc has UNITLESS; VSpleenc is "volume fraction of spleen";
  VThyroidc has UNITLESS; VThyroidc is "volume fraction of thyroid";
  VUrinarytractc has UNITLESS; VUrinarytractc is "volume fraction of urinary tract";
  VLungc has UNITLESS; VLungc is "volume fraction of lung";
  VStomachc has UNITLESS; VStomachc is "volume fraction of stomach";
  VLiverc = 0.0248 UNITLESS; VLiverc is "volume fraction of liver";
  VBloodc has UNITLESS; VBloodc is "volume fraction of blood";
  QAdipose has L_PER_DAY; QAdipose is "plasma flow to adipose";
  QAdiposec has UNITLESS; QAdiposec is "blood fraction to adipose tissue";
  VLiver has L; VLiver is "volume of liver";
  QRest has L_PER_DAY; QRest is "plasma flow to rest of the body";
  QLiver has L_PER_DAY; QLiver is "plasma flow to liver";
  QLiverc has UNITLESS; QLiverc is "blood fraction to liver";
  PIntestine = 0.03431731 UNITLESS; PIntestine is "Partition coefficient plasma / intestine tissue";
  PKidney = 0.08494018 UNITLESS; PKidney is "Partition coefficient plasma / kidney";
  PLiver = 0.07172916 UNITLESS; PLiver is "Partition coefficient plasma / liver";
  PAdipose = 0.09341268 UNITLESS; PAdipose is "Partition coefficient plasma / adipose";
  PRest = 0.04101715 UNITLESS; PRest is "Partition coefficient plasma / Restbody";
  kabs has L_PER_DAY; kabs is "Intestinal absorption";
  VmaxOATP2B1 has MicroGM_PER_DAY; VmaxOATP2B1 is "Limiting rate of OAT P2B1";
  VmaxOATP2B1c has microg_per_day_per_L; VmaxOATP2B1c is "Limiting rate of OAT P2B1 relativized by intestinal lumen volume";
  Km_OATP2B1 has MicroGM_PER_L; Km_OATP2B1 is "Michaelis-Menten constant";
  Vmax_OATP1B1 has MicroGM_PER_DAY; Vmax_OATP1B1 is "Limiting rate of OAT P1B1";
  Vmax_OATP1B1c has microg_per_day_per_L; Vmax_OATP1B1c is "Limiting rate of OAT P1B1 relativized by extracellular liver";
  Km_OATP1B1 = 21800.79 MicroGM_PER_L; Km_OATP1B1 is "Michaelis_Menten constant";
  Vmax_OATP1B3 has MicroGM_PER_DAY; Vmax_OATP1B3 is "Limiting rate of OAT P1B3";
  Vmax_OATP1B3c has microg_per_day_per_L; Vmax_OATP1B3c is "Limiting rate of OAT P1B3 relativized by extracellular liver";
  Km_OATP1B3 = 37932.95 MicroGM_PER_L; Km_OATP1B3 is "Michaelis_Menten constant";
  Vmax_OAT4 has MicroGM_PER_DAY; Vmax_OAT4 is "Limiting rate of OAT4";
  Vmax_OAT4c = 13756588116 microg_per_day_per_L; Vmax_OAT4c is "Limiting rate of OAT4 relativized by kidney proximal tubule";
  Km_OAT4 has MicroGM_PER_L; Km_OAT4 is "Michaelis-Menten constant";
  Vmax_BSEP has MicroGM_PER_DAY; Vmax_BSEP is "Limiting rate of BSEP";
  Vmax_BSEPc = 48535498 microg_per_day_per_L; Vmax_BSEPc is "Limiting rate of BSEP relativized by liver intracellular";
  Km_BSEP = 6790.748 MicroGM_PER_L; Km_BSEP is "Michaelis-Menten constant";
  CL_menses has L_per_day; CL_menses is "Plasma menstrual loss";
  GFR has L_PER_DAY; GFR is "glomerular filtration rate";
  QUrine has L_PER_DAY; QUrine is "Urine secretion flow";
  QTubule has L_per_day; QTubule is "proximaltubule fluid flow";
  SAlb has UNITLESS; SAlb is "serum albumine concentration";
  fup has UNITLESS; fup is "fraction unbound in plasma";
  R_L_ec has UNITLESS; R_L_ec is "Albumin ratio between plasma and liver extracellular";
  fu_Liver_intracellular has UNITLESS; fu_Liver_intracellular is "fraction unbound in liver intracellular";
  R_PTL has UNITLESS; R_PTL is "Albumin ratio between plasma and proximal tubule lumen";
  fu_Kidney_proximal_tubule has UNITLESS; fu_Kidney_proximal_tubule is "fraction unbound in proximal tubule lumen";
  kfe = 3.36 per_day; kfe is "fecal excretion";

  // Assignment rules:
  Intestine_lumen := VIntestine_lumen;
  Intestine_tissue := VIntestine_tissue;
  Liver_extracellular := VLiver_extracellular;
  Liver_intracellular := VLiver_intracellular;
  Plasma := VPlasma;
  Kidney_proximal_tubule_tissue := VKidney_proximal_tubule_tissue;
  Kidney_proximal_tubule_lumen := VKidney_proximal_tubule_lumen;
  Kidney_rest_tissue := VKidney_rest_tissue;
  Kidney_rest_lumen := VKidney_rest_lumen;
  Adipose := VAdipose;
  Rest := VRest;
  VIntestine_lumen := VIntestine_lumenc*BW;
  VIntestine_tissue := VIntestine_tissuec*BW;
  VLiver_extracellular := VLiver*(1 - 0.573);
  VLiver_intracellular := VLiver*0.573;
  VPlasma := VBloodc*(1 - HCT)*BW;
  VKidney_proximal_tubule_tissue := 0.398*VKidney*(0.137*(1 - HCT) + 0.46);
  VKidney_proximal_tubule_lumen := 0.398*VKidney*0.403;
  VKidney_rest_tissue := VKidney - VKidney_proximal_tubule_tissue - VKidney_proximal_tubule_lumen - VKidney_rest_lumen;
  VKidney_rest_lumen := (VKidney - 0.398*VKidney)*0.283;
  VAdipose := VAdiposec*BW/0.9 + MAc/0.9;
  VRest := 0.94*BW - (VIntestine_tissue + VLiver + VKidney + VAdipose + VPlasma);
  BW := 80.126;
  QC := 5388.262;
  HCT := 0.427;
  QIntestine := QIntestinec/0.96*QC;
  QIntestinec := VIntestine_tissuec/0.014*0.144;
  VKidney := VKidneyc*BW;
  VKidneyc := 0.00421;
  QKidney := QKidneyc/0.96*QC;
  QKidneyc := VKidneyc/0.00421*0.196;
  VAdiposec := 0.96 - VAdrenalc - VBonec - VBonenonperfusedc - VBrainc - VBreastc - VHeartc - VMarrowc - VMusclec - VGonadc - VPancreasc - VSkinc - VSpleenc - VThyroidc - VUrinarytractc - VKidneyc - VLungc - VIntestine_tissuec - VStomachc - VLiverc - VBloodc;
  MAc := 2.398;
  VAdrenalc := 0.0002;
  VBonec := 0.032;
  VBonenonperfusedc := 0.095 - VBonec;
  VBrainc := 1.45/BW;
  VBreastc := 0.000342;
  VHeartc := 0.0045;
  VMarrowc := 0.047;
  VMusclec := 0.39;
  VGonadc := 0.001;
  VPancreasc := 0.00192;
  VSkinc := 0.0488;
  VSpleenc := 0.0021;
  VThyroidc := 0.000274;
  VUrinarytractc := 0.00104;
  VLungc := 0.0068;
  VStomachc := 0.0021;
  VBloodc := 0.0761;
  QAdipose := QAdiposec/0.96*QC;
  QAdiposec := VAdiposec/0.2*0.052;
  VLiver := VLiverc*BW;
  QRest := QC - (QAdipose + QIntestine + QKidney + QLiver);
  QLiver := QLiverc/0.96*QC;
  QLiverc := VLiverc/0.0247*0.065;
  kabs := 0.694;
  VmaxOATP2B1 := VmaxOATP2B1c*VIntestine_lumen;
  VmaxOATP2B1c := 228035946;
  Km_OATP2B1 := 61563.93;
  Vmax_OATP1B1 := Vmax_OATP1B1c*VLiver_extracellular;
  Vmax_OATP1B1c := 4123143432;
  Vmax_OATP1B3 := Vmax_OATP1B3c*VLiver_extracellular;
  Vmax_OATP1B3c := 402140177;
  Vmax_OAT4 := Vmax_OAT4c*VKidney_proximal_tubule_tissue;
  Km_OAT4 := 19461.29;
  Vmax_BSEP := Vmax_BSEPc*VLiver_intracellular;
  CL_menses := 0;
  GFR := 182.5913;
  QUrine := 0.022*BW;
  QTubule := 0.36*GFR;
  SAlb := 45.15337;
  fup := 1/(1 + 41071.34*(SAlb*0.001/(1 - SAlb*10^(-3) - 0.031)) + 173.4528*(0.031/(1 - SAlb*0.001 - 0.031)));
  R_L_ec := SAlb/1.2e-6;
  fu_Liver_intracellular := R_L_ec*fup/(1 + (R_L_ec - 1)*fup);
  R_PTL := SAlb/0.0144;
  fu_Kidney_proximal_tubule := R_PTL*fup/(1 + (R_PTL - 1)*fup);

  // Reactions:
  J1_: AIntestine_lumen -> AIntestine_tissue; kabs*(AIntestine_lumen/VIntestine_lumen) + VmaxOATP2B1/(Km_OATP2B1 + AIntestine_lumen/VIntestine_lumen)*(AIntestine_lumen/VIntestine_lumen);
  J2_: AIntestine_tissue -> ALiver_extracellular; QIntestine*(AIntestine_tissue/VIntestine_tissue/PIntestine);
  J3_: ALiver_extracellular -> ALiver_intracellular; Vmax_OATP1B1/(Km_OATP1B1 + ALiver_extracellular/VLiver_extracellular*fup)*(ALiver_extracellular/VLiver_extracellular)*fup + Vmax_OATP1B3/(Km_OATP1B3 + ALiver_extracellular/VLiver_extracellular*fup)*(ALiver_extracellular/VLiver_extracellular)*fup;
  J4_: ALiver_intracellular -> AIntestine_lumen; Vmax_BSEP/(Km_BSEP + ALiver_intracellular/VLiver_intracellular*fu_Liver_intracellular)*(ALiver_intracellular/VLiver_intracellular)*fu_Liver_intracellular;
  J5_: ALiver_extracellular -> APlasma; (QIntestine + QLiver)*(ALiver_extracellular/VLiver_extracellular/PLiver);
  J6_: APlasma -> ALiver_extracellular; QLiver*(APlasma/VPlasma);
  J7_: APlasma -> AIntestine_tissue; QIntestine*(APlasma/VPlasma);
  J8_: APlasma -> AKidney_proximal_tubule_tissue; QKidney*(APlasma/VPlasma);
  J9_: APlasma -> AAdipose; QAdipose*(APlasma/VPlasma);
  J10_: APlasma -> ARest; QRest*(APlasma/VPlasma);
  J11_: APlasma -> AKidney_proximal_tubule_lumen; GFR*(APlasma/VPlasma)*fup;
  J12_: AAdipose -> APlasma; QAdipose*(AAdipose/VAdipose/PAdipose);
  J13_: ARest -> APlasma; QRest*(ARest/VRest/PRest);
  J14_: AKidney_rest_tissue -> APlasma; QKidney*(AKidney_rest_tissue/VKidney_rest_tissue/PKidney);
  J15_: AKidney_proximal_tubule_tissue -> AKidney_rest_tissue; QKidney*(AKidney_proximal_tubule_tissue/VKidney_proximal_tubule_tissue);
  J16_: AKidney_proximal_tubule_lumen -> AKidney_rest_lumen; QTubule*(AKidney_proximal_tubule_lumen/VKidney_proximal_tubule_lumen);
  J17_: AKidney_proximal_tubule_lumen -> AKidney_proximal_tubule_tissue; Vmax_OAT4/(Km_OAT4 + AKidney_proximal_tubule_lumen/VKidney_proximal_tubule_lumen*fu_Kidney_proximal_tubule)*(AKidney_proximal_tubule_lumen/VKidney_proximal_tubule_lumen)*fu_Kidney_proximal_tubule;
  J18_: AIntestine_lumen -> AFeces; kfe*AIntestine_lumen;
  J19_: AKidney_rest_lumen -> AUrine; QUrine*(AKidney_rest_lumen/VKidney_rest_lumen);
  J20_: APlasma -> AMenstrual; CL_menses*(APlasma/VPlasma);

  // Unit definitions:
  unit time_unit = 86400 second;
  unit DAY = 86400 second;
  unit day = 86400 second;
  unit substance = 1e-6 gram;
  unit MicroGM = 1e-6 gram;
  unit microg = 1e-6 gram;
  unit microg_kg = 1e-6 gram / (1000 gram);
  unit volume = litre;
  unit L = litre;
  unit kg = 1000 gram;
  unit UNITLESS = dimensionless;
  unit L_per_day = litre / (86400 second);
  unit microg_per_L = 1e-6 gram / litre;
  unit microg_per_day = 1e-6 gram / (86400 second);
  unit microg_per_day_per_L = 1e-6 gram / (86400 second * litre);
  unit g = gram;
  unit per_day = 1 / (86400 second);
  unit L_PER_DAY = litre / (86400 second);
  unit MicroGM_PER_L = 1e-6 gram / litre;
  unit MicroGM_PER_DAY = 1e-6 gram / (86400 second);
end
